Tue Nov 21 10:12:07 CET 2017
;# clean: rm  -r modelfit_dir* psn-* submitscript.* hostfile.* parafile-*
;#
;# qpsn -c auto -t 23:00:00 -r 300 -- execute run0308.mod -nm_output=ext,cov -clean=3
;#
;# qpsn -t 23:00:00 -r 300 -- vpc run0308.mod -samples=1000 -stratify_on=STRT -bin_by_count=0 -idv=TAD -bin_array=-0.1,0.1,0.4,0.6,0.9,1.1,1.8,2.2,2.6,3.4,3.6,4.4,5.6,6.4,7.4,8.6,9.4,10.6,11.4,12.6,15.4,16.6,23.4,24.6,34.9,37.1,46.9,49.1 -dir=vpc0308
;#
$PROBLEM    D5139C00003 PK
$INPUT      PKFL DV ID FLAG PERIOD TAD TIME AMT EVID CMT MDV TRTPN
            TRT1 TRT2 TRT3 TRT4
$DATA      PK_D5139C00003.csv IGNORE=@ IGNORE=(PKFL.EQ.0)
            IGNORE=(TRTPN.EQ.1) IGNORE=(TRTPN.EQ.3)
            IGNORE=(TRTPN.EQ.4)
 ;; Use PK analysis set
 ;; Ignore OD susp in  Water
 ;; Ignore OD with Water
 ;; Ignore OD without Water
$SUBROUTINE ADVAN6 TOL=6
$MODEL      NCOMP=4 COMP=(cent) ;; central compartment ticagrelor
            COMP=(centmet) ;; central compartment metabolite
            COMP=(peri) ;; peripheral compartment ticagrelor
            COMP=(perimet) ;; peripheral compartment metabolite

;--------------------------
$PK

"FIRST
" COMMON/PRCOMG/ IDUM1,IDUM2,IMAX,IDUM4,IDUM5
"INTEGER IDUM1,IDUM2,IMAX,IDUM4,IDUM5
"IMAX=1000000

   ;# Set up dosing times
   IF(NEWIND.LE.1) THEN
      TDOS= -1000
      PD=0
   ENDIF
   IF(AMT.GT.0) THEN
      TDOS = TIME ; If AMT > 0, set TDOS to TIME
      PD = AMT    ; If AMT > 0, update PD
   ENDIF
   TAD2 = TIME-TDOS ; Set time after dose

   E1=EXP(ETA(1))
   E2=EXP(ETA(2))
   E3=EXP(ETA(3))
   E4=EXP(ETA(4))
   E5=EXP(ETA(5))
   E6=EXP(ETA(6))
   E7=EXP(ETA(7))

   TVCL=THETA(1)
   CL=TVCL*E1

   TVV1=THETA(2)
   V1=TVV1

   TVV2=THETA(3)
   V2=TVV2

   TVQ1=THETA(4)
   Q1=TVQ1*E2

   TVCLM=THETA(8)
   CLM=TVCLM*E3

   TVVM1=THETA(9)
   VM1=TVVM1

   TVVM2=THETA(10)
   VM2=TVVM2*E4

   TVQ2=THETA(11)
   Q2=TVQ2

   MTT=THETA(6)*E5
   NT=1+THETA(15)*E6
   KTR=NT/MTT
   NN=NT-1

   ;;-- Approximation of log(factorial(NN))
   IF(NN.GE.0.558) THEN
      L = LOG(2.5066)+(NN+.5)*LOG(NN)-NN+LOG(1+1/(12*NN))
   ELSE
      L= -0.1171157 + 0.5690*((0.558 - NN)**2) - 0.1122*(0.558 - NN)
   ENDIF

   K13=Q1/V1
   K31=Q1/V2

   TVfm=0.22
   fm=TVfm

   K10=CL*(1-fm)/V1
   K12=fm*CL/V1

   K24=Q2/VM1
   K42=Q2/VM2
   K20=CLM/VM1

   S1=V1
   S2=VM1
   F1=0
   BIO=THETA(7)*E7

   X=0.0000001
$DES
   IF(T.GE.TDOS) THEN
      DADT(1)= BIO*PD*KTR*EXP(NN*LOG(KTR*(T-TDOS) + X) - KTR*(T - TDOS)-L)  - k10*A(1) - k12*A(1) - k13*A(1)+k31*A(3)
   ELSE
      DADT(1)=  - k12*A(1) - k13*A(1)+k31*A(3)
   ENDIF
   DADT(2)=  k12*A(1) - k20*A(2) - k24*A(2)+k42*A(4)
   DADT(3)=  k13*A(1)-k31*A(3)
   DADT(4)=  k24*A(2)-k42*A(4)

$ERROR

   STRT=FLAG

   ;;Separate residual error for ticagrelor and the active metabolite, AR-C124910XX

   IF(FLAG.LE.1) THEN
      IPRED=A(1)/S1
      W=sqrt( (theta(5)*IPRED)**2 + theta(13)**2 )  ;;prop and add  error ticagrelor
      Y=IPRED+W*EPS(1)
   ELSE
      IPRED=A(2)/S2
      W=sqrt( (theta(12)*IPRED)**2 + theta(14)**2 )  ;;prop and add  error metabolite
      Y=IPRED+W*EPS(1)
   ENDIF

   CP=A(1)/S1
   CM=A(2)/S2

   DEL=0
   IF (W.EQ.0) DEL=1
   IRES=DV-IPRED
   IWRES=IRES/(W+DEL)

;--------------------------
$THETA  (0,16.5964) ; 1 CL L/h ticagrelor
 (0,144.673) ; 2 V1 L ticagrelor
 (0,68.9777) ; 3 V2 L ticagrelor
 (0,15.7851) ; 4 Q1 ticagrelor
 (0,0.36446) ; 5  ERROR ticagrelor
 (0,1.00) ; 6 MTT
 1 FIX ; 7 F1
 (0,10.387) ; 8 CLM metabolite
 (0,7.53503) ; 9 VM1 L metabolite
 (0,43.3393) ; 10 VM2 L metabolite
 (0,4.55635) ; 11 Q2 metabolite
 (0,0.279073) ; 12 ERROR metabolite
 (0,3) ; 13 Add ERROR ticagrelor
 (0,3) ; 14 Add ERROR metabolite
 (1,5,12) ; 15 NTR
;--------------------------
$OMEGA  0.0558419  ; 1 CL ticagrelor
$OMEGA  0.193658  ; 2 Q1 ticagrelor
$OMEGA  0.0857882  ; 3 CL metabolite
$OMEGA  0  FIX  ; 4 V2 metabolite
$OMEGA  0.321524  ;      5 KTR
$OMEGA  0  FIX  ;      6 NTR
$OMEGA  0.0975457  ; 7 Bioavailability
;--------------------------
$SIGMA  1  FIX
;--------------------------
$ESTIMATION SIGDIG=3 NOABORT PRINT=5 MAXEVAL=9999 METHOD=1 INTERACTION
            SIGL=15
$COVARIANCE PRINT=E
$TABLE      PKFL DV ID FLAG PERIOD TAD TIME AMT EVID CMT MDV TRTPN
            IPRED IWRES RES CWRES CL V1 V2 Q1 F1 CLM fm VM1 VM2 Q2 KTR
            MTT NT ETA1 ETA2 ETA3 ETA4 ETA5 ETA6 ETA7 NOPRINT
            ONEHEADER file=run0308.txt

NM-TRAN MESSAGES
 WARNINGS AND ERRORS (IF ANY) FOR PROBLEM    1
 (WARNING  2) NM-TRAN INFERS THAT THE DATA ARE POPULATION.
 (WARNING  113) VERBATIM CODE CONTAINS "COMMON". IF THIS IS NOT A
 USER-DEFINED COMMON, IT SHOULD BE REPLACED BY THE APPROPRIATE MODULE.
Note: The following floating-point exceptions are signalling: IEEE_INVALID_FLAG IEEE_DIVIDE_BY_ZERO

1NONLINEAR MIXED EFFECTS MODEL PROGRAM (NONMEM) VERSION 7.3.0
 ORIGINALLY DEVELOPED BY STUART BEAL, LEWIS SHEINER, AND ALISON BOECKMANN
 CURRENT DEVELOPERS ARE ROBERT BAUER, ICON DEVELOPMENT SOLUTIONS,
 AND ALISON BOECKMANN. IMPLEMENTATION, EFFICIENCY, AND STANDARDIZATION
 PERFORMED BY NOUS INFOSYSTEMS.
 PROBLEM NO.:         1
 D5139C00003 PK
 TOT. NO. OF OBS RECS:      837
 TOT. NO. OF INDIVIDUALS:     33
 GENERAL NONLINEAR KINETICS MODEL (ADVAN6)
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 #TBLN:      1
 #METH: First Order Conditional Estimation with Interaction
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
 #TERM:
0MINIMIZATION SUCCESSFUL
 NO. OF FUNCTION EVALUATIONS USED:     1239
 NO. OF SIG. DIGITS IN FINAL EST.:  3.4

 ETABAR IS THE ARITHMETIC MEAN OF THE ETA-ESTIMATES,
 AND THE P-VALUE IS GIVEN FOR THE NULL HYPOTHESIS THAT THE TRUE MEAN IS 0.

 ETABAR:         1.2950E-03 -1.7245E-04  1.4644E-03  0.0000E+00  2.6514E-03  0.0000E+00  2.0472E-03
 SE:             4.5575E-02  2.4658E-02  3.4181E-02  0.0000E+00  6.5575E-02  0.0000E+00  3.7812E-02
 N:                      33          33          33          33          33          33          33

 P VAL.:         9.7733E-01  9.9442E-01  9.6583E-01  1.0000E+00  9.6775E-01  1.0000E+00  9.5682E-01

 ETAshrink(%):   1.0000E-10  2.6864E+01  3.8690E+00  1.0000E+02  1.8482E-01  1.0000E+02  2.0138E+00
 EBVshrink(%):   1.2765E+00  2.7426E+01  5.4593E+00  0.0000E+00  1.3429E+00  0.0000E+00  3.4658E+00
 EPSshrink(%):   8.4837E+00

 #TERE:
 Elapsed estimation time in seconds:   437.70
 Elapsed covariance time in seconds:   506.14

 ********************               FIRST ORDER CONDITIONAL ESTIMATION WITH INTERACTION              ********************
 #OBJT:**************                       MINIMUM VALUE OF OBJECTIVE FUNCTION                      ********************
 #OBJV:********************************************     6130.993       **************************************************

 ********************               FIRST ORDER CONDITIONAL ESTIMATION WITH INTERACTION              ********************
 ********************                             FINAL PARAMETER ESTIMATE                           ********************

 THETA - VECTOR OF FIXED EFFECTS PARAMETERS   *********
         TH 1      TH 2      TH 3      TH 4      TH 5      TH 6      TH 7      TH 8      TH 9      TH10      TH11      TH12
          TH13      TH14      TH15
         2.77E+01  1.13E+02  9.82E+01  2.08E+01  1.68E-01  9.38E-01  1.00E+00  1.56E+01  9.70E+00  4.45E+01  5.56E+00  1.46E-01
          1.66E+00  1.08E+00  1.96E+00

 OMEGA - COV MATRIX FOR RANDOM EFFECTS - ETAS  ********
            ETA1      ETA2      ETA3      ETA4      ETA5      ETA6      ETA7
 ETA1
+        7.05E-02
 ETA2
+        0.00E+00  3.87E-02
 ETA3
+        0.00E+00  0.00E+00  4.30E-02
 ETA4
+        0.00E+00  0.00E+00  0.00E+00  0.00E+00
 ETA5
+        0.00E+00  0.00E+00  0.00E+00  0.00E+00  1.47E-01
 ETA6
+        0.00E+00  0.00E+00  0.00E+00  0.00E+00  0.00E+00  0.00E+00
 ETA7
+        0.00E+00  0.00E+00  0.00E+00  0.00E+00  0.00E+00  0.00E+00  5.07E-02

 SIGMA - COV MATRIX FOR RANDOM EFFECTS - EPSILONS  ****
            EPS1
 EPS1
+        1.00E+00

 OMEGA - CORR MATRIX FOR RANDOM EFFECTS - ETAS  *******
            ETA1      ETA2      ETA3      ETA4      ETA5      ETA6      ETA7
 ETA1
+        2.65E-01
 ETA2
+        0.00E+00  1.97E-01
 ETA3
+        0.00E+00  0.00E+00  2.07E-01
 ETA4
+        0.00E+00  0.00E+00  0.00E+00  0.00E+00
 ETA5
+        0.00E+00  0.00E+00  0.00E+00  0.00E+00  3.83E-01
 ETA6
+        0.00E+00  0.00E+00  0.00E+00  0.00E+00  0.00E+00  0.00E+00
 ETA7
+        0.00E+00  0.00E+00  0.00E+00  0.00E+00  0.00E+00  0.00E+00  2.25E-01

 SIGMA - CORR MATRIX FOR RANDOM EFFECTS - EPSILONS  ***
            EPS1
 EPS1
+        1.00E+00

 ********************               FIRST ORDER CONDITIONAL ESTIMATION WITH INTERACTION              ********************
 ********************                            STANDARD ERROR OF ESTIMATE                          ********************

 THETA - VECTOR OF FIXED EFFECTS PARAMETERS   *********
         TH 1      TH 2      TH 3      TH 4      TH 5      TH 6      TH 7      TH 8      TH 9      TH10      TH11      TH12
          TH13      TH14      TH15
         1.81E+00  1.07E+01  6.39E+00  2.39E+00  8.68E-03  7.13E-02 .........  5.80E-01  4.09E-01  2.25E+00  3.89E-01  7.43E-03
          1.64E-01  1.60E-01  1.89E-01

 OMEGA - COV MATRIX FOR RANDOM EFFECTS - ETAS  ********
            ETA1      ETA2      ETA3      ETA4      ETA5      ETA6      ETA7
 ETA1
+        3.10E-02
 ETA2
+       .........  1.39E-02
 ETA3
+       ......... .........  1.17E-02
 ETA4
+       ......... ......... ......... .........
 ETA5
+       ......... ......... ......... .........  3.38E-02
 ETA6
+       ......... ......... ......... ......... ......... .........
 ETA7
+       ......... ......... ......... ......... ......... .........  1.85E-02

 SIGMA - COV MATRIX FOR RANDOM EFFECTS - EPSILONS  ****
            EPS1
 EPS1
+       .........

 OMEGA - CORR MATRIX FOR RANDOM EFFECTS - ETAS  *******
            ETA1      ETA2      ETA3      ETA4      ETA5      ETA6      ETA7
 ETA1
+        5.83E-02
 ETA2
+       .........  3.53E-02
 ETA3
+       ......... .........  2.81E-02
 ETA4
+       ......... ......... ......... .........
 ETA5
+       ......... ......... ......... .........  4.41E-02
 ETA6
+       ......... ......... ......... ......... ......... .........
 ETA7
+       ......... ......... ......... ......... ......... .........  4.12E-02

 SIGMA - CORR MATRIX FOR RANDOM EFFECTS - EPSILONS  ***
            EPS1
 EPS1
+       .........
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
 ********************               FIRST ORDER CONDITIONAL ESTIMATION WITH INTERACTION              ********************
 ********************                      EIGENVALUES OF COR MATRIX OF ESTIMATE                     ********************

             1         2         3         4         5         6         7         8         9        10        11        12
             13        14        15        16        17        18        19
         2.95E-02  3.11E-02  9.15E-02  1.02E-01  1.62E-01  1.73E-01  2.04E-01  2.96E-01  3.65E-01  5.23E-01  6.01E-01  8.30E-01
          1.11E+00  1.14E+00  1.37E+00  1.86E+00  2.01E+00  3.19E+00  4.90E+00
 #CPUT: Total CPU Time in Seconds,      945.194
